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p := m*R*T/V  # error: {0} has multiple definitions, you must specify the label to select the definition that you want.
Wv == -integral(p, V = 1 .. 2) → Wv == -(R*T*m*ln(2))
-(R*T*m*ln(2)) == m*R*T*ln(p2/p1)
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clear(p)
Wv := -(R*T*m*ln(2))  # error: {0} has multiple definitions, you must specify the label to select the definition that you want.
V := m*R*T/p → R*T*m/p
Wt := integral(V, p = 1 .. 2) → R*T*m*ln(2)
Wt == Wv → R*T*m*ln(2) == -(R*T*m*ln(2))
Q12 == -Wv
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T := 20 °C = 293.15 K
m := 2 kg
R := 287.05*J/(kg*K)
integral(R*T*m/p, p = 1 bar .. 6 bar) → 301548.486973*J*K/K = 301548 J
